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/batch
! ANSYS input file written by Workbench version 16.0 RELEASE
! File used for geometry attach: C:\Users\Manish\AppData\Local\Temp\WB_MANISHDESKTOP_Manish_5036_5\unsaved_project_files\dp0\SYS\DM\SYS.agdb
/title,unsaved_project--Static Structural (A5)
/com,--- Data in consistent NMM units. See Solving Units in the help system for more information.
/units,MPA
/prep7
! Turn off shape checking because checks already performed inside WB mesher.
! See help system for more information.
SHPP,OFF,,NOWARN
etcon,set             ! allow ANSYS to choose best KEYOP's for 180x elements
/com,*********** Nodes for the whole assembly ***********
nblock,3
(1i9,3e20.9e3)
        1    1.538461538E+002    0.000000000E+000   -1.428571429E+001
        2    1.476923077E+002    0.000000000E+000   -1.428571429E+001
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-1
/com,*********** Elements for Body 1 "Part1" ***********
et,1,186
keyo,1,2,1          ! set full integration on SOLID186
eblock,19,solid,,520
(19i9)
        1        1        1        1        0        0        0        0       20        0      183     1167     1783     1851     1853     1586     1842     1852     1887
     1927     3683     3809     1928     3276     3792     3810     3277     1926     3682     3808     3813
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-1
/com,*********** Elements for Body 2 "Part1" ***********
et,2,186
keyo,2,2,1          ! set full integration on SOLID186
eblock,19,solid,,182
(19i9)
        2        2        2        2        0        0        0        0       20        0        1        1      313      312      296      144      319      311      308
      342     1134     1115      341      804     1133     1128      803      339     1136     1132     1114
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-1
/com,*********** Send User Defined Coordinate System(s) ***********
csys,0
toffst,273.15,  ! Temperature offset from absolute zero
/com,*********** Set Reference Temperature ***********
tref,22.
/com,*********** Send Materials ***********
MP,DENS,1,7.85e-09,	! tonne mm^-3
MP,ALPX,1,1.2e-05,	! C^-1
MP,C,1,434000000,	! mm^2 s^-2 C^-1
MP,KXX,1,60.5,	! tonne mm s^-3 C^-1
MP,RSVX,1,0.00017,	! ohm mm
MP,EX,1,200000,	! tonne s^-2 mm^-1
MP,NUXY,1,0.3,
MP,MURX,1,10000,

MP,DENS,2,7.85e-09,	! tonne mm^-3
MP,ALPX,2,1.2e-05,	! C^-1
MP,C,2,434000000,	! mm^2 s^-2 C^-1
MP,KXX,2,60.5,	! tonne mm s^-3 C^-1
MP,RSVX,2,0.00017,	! ohm mm
MP,EX,2,200000,	! tonne s^-2 mm^-1
MP,NUXY,2,0.3,
MP,MURX,2,10000,

!************************* Model Summary ********************
!Part1,	Structural Steel,	matid,	1
!Part1,	Structural Steel,	matid,	2
!************************* End Model Summary ********************
/com,*********** Create Contact "Contact Region" ***********
*set,tid,4
*set,cid,3
r,tid
r,cid
et,tid,170
et,cid,174
eblock,10,,,24
(15i9)
      703        4        4        4        0     1850     1860     1853     1851     3807     3812     3809     3806
      704        4        4        4        0     1849     1867     1860     1850     3805     3832     3807     3804
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-1
eblock,10,,,24
(15i9)
      727        3        3        3        0     1850     1860     1853     1851     3807     3812     3809     3806
      728        3        3        3        0     1849     1867     1860     1850     3805     3832     3807     3804
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-1
eblock,10,,,14
(15i9)
      751        3        4        3        0      336      325      281      282     1152     1086     1085     1087
      752        3        4        3        0      335      326      325      336     1154     1151     1152     1166
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-1
eblock,10,,,14
(15i9)
      765        4        3        4        0      336      325      281      282     1152     1086     1085     1087
      766        4        3        4        0      335      326      325      336     1154     1151     1152     1166
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-1
keyo,cid,8,2               ! auto create asymmetric contact (from Program Controlled setting)
keyo,cid,10,2              ! adjust contact stiffness each NR iteration (from Program Controlled setting)
keyo,cid,12,5              ! bonded always
keyo,cid,2,0               ! augmented Lagrange (from Program Controlled setting)
keyo,cid,4,0               ! on Gauss point (from Program Controlled setting)
keyo,cid,9,1               ! ignore initial gaps/penetration
keyo,cid,7,0               ! No Prediction
rmod,tid,3,10.	! FKN
rmod,tid,5,0.	! ICONT
rmod,tid,6,0.	! PINB
rmod,tid,10,0.	! CNOF
rmod,tid,12,0.	! FKT
rmod,tid,36,25	! WB DSID
rmod,cid,3,10.	! FKN
rmod,cid,5,0.	! ICONT
rmod,cid,6,0.	! PINB
rmod,cid,10,0.	! CNOF
rmod,cid,12,0.	! FKT
rmod,cid,36,25	! WB DSID
nsel,all
esel,all
/com,*********** Fixed Supports ***********
CMBLOCK,_FIXEDSU,NODE,      147
(8i10)
      1671      1672      1673      1674      1675      1676      1677      1698
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cmsel,s,_FIXEDSU
d,all,all
nsel,all
nsel,all
/com,*********** Define Force Using Surface Effect Elements ***********
local,12,0,0.,0.,0.,-0.,0.,0.
csys,0
et,5,154
eblock,10,,,14
(15i9)
      779        5        5        5       12      319      313      312      311     1136     1134     1132     1133
      780        5        5        5       12      320      314      313      319     1138     1135     1136     1146
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-1
esel,s,type,,5
keyop,5,2,1                ! Apply load in local coordinate system
keyop,5,7,1                ! Use original area so load is constant in large deformation
keyop,5,11,2               ! Use real and not project area
esel,all

*DIM,_loadvari34x,TABLE,2,1,1,TIME,
! Time values
_loadvari34x(1,0,1) = 0.
_loadvari34x(2,0,1) = 1.
! Load values
_loadvari34x(1,1,1) = 0.250000000000019
_loadvari34x(2,1,1) = 0.250000000000019


*DIM,_loadvari34y,TABLE,2,1,1,TIME,
! Time values
_loadvari34y(1,0,1) = 0.
_loadvari34y(2,0,1) = 1.
! Load values
_loadvari34y(1,1,1) = 0.
_loadvari34y(2,1,1) = 0.


*DIM,_loadvari34z,TABLE,2,1,1,TIME,
! Time values
_loadvari34z(1,0,1) = 0.
_loadvari34z(2,0,1) = 1.
! Load values
_loadvari34z(1,1,1) = 0.
_loadvari34z(2,1,1) = 0.

fini
/com,****************************************************************************
/com,*************************    SOLUTION       ********************************
/com,****************************************************************************
/solu
antype,0                   ! static analysis
neqit,1,force              ! Force 1 eq iteration since only nonlinearity is bonded/no sep contact
pred,off
eqsl,sparse,,,,,1
cntr,print,1               ! print out contact info and also make no initial contact an error
nldiag,cont,iter           ! print out contact info each equilibrium iteration
resc,,none                 ! Do not keep any restart files
/com,****************************************************
/com,******************* SOLVE FOR LS 1 ****************
esel,s,type,,5
nsle
sfe,all,1,pres,1,%_loadvari34x%
sfe,all,2,pres,1,%_loadvari34y%
sfe,all,3,pres,1,%_loadvari34z%
nsel,all
esel,all
nsub,1,1,1
time,1.
outres,erase
outres,all,none
outres,nsol,all
outres,rsol,all
outres,strs,all
outres,epel,all
outres,eppl,all
stabilize,off                   ! Stabilization turned OFF by user
! *********** WB SOLVE COMMAND ***********
! check interactive state
*get,ANSINTER_,active,,int
*if,ANSINTER_,ne,0,then
/eof
*endif
solve
/com *************** Write FE CONNECTORS *********
CEWRITE,file,ce,,INTE
/com,****************************************************
/com,*************** FINISHED SOLVE FOR LS 1 *************
*set,_DS_PROGRESS          ! turn off progress updates to avoid virus scanning bug
/post1
fini
